Т1w' := 1150
Кпер := -0.08
Tk' := 683.2
Кср := 0.05
Квт := -0.15
Tgrf'per := Т1w' + Кпер*(Т1w' - Tk') = 1112.66
Tgrf'CP := Т1w' + Кср*(Т1w' - Tk') = 1173.34
Tgrf'vtul := Т1w' + Квт*(Т1w' - Tk') = 1079.98
n := 14860
ω := (3.14*n)/30 = 1555.35
r1 := 0.1859
u := ω*r1 = 289.139
u^2 = 83601.3
Lper := 0.1046
Lcr := 0.082
Lkor := 0.0596
ΔΤцпер := (u^2*Lper)/(1100*r1) = 42.7635
ΔΤцср := (u^2*Lcr)/(1100*r1) = 33.5239
ΔΤцk := (u^2*Lkor)/(1100*r1) = 24.3662
ΔΤзак := 70
ΔΤконв := 20
Тохл''per := Tk' + (-ΔΤзак) + ΔΤцпер + ΔΤконв = 675.963
Тохл''cr := Tk' + (-ΔΤзак) + ΔΤцср + ΔΤконв = 666.724
Тохл''к := Tk' + (-ΔΤзак) + ΔΤцk + ΔΤконв = 657.566
